*Heading
** Job name: first_attempt Model name: Model-1
** Generated by: Abaqus/CAE 2020
*Preprint, echo=NO, model=NO, history=NO, contact=NO
**
** PARTS
**
*Part, name=Part-1
*Node
      1,         30.5,           0.
      2,         30.5,         -1.5
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*Element, type=CPE4, Elset=Composite
   1,     1,    13,  9821,  4794
   2,    13,    14,  9822,  9821
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*ELEMENT, TYPE=COH2D4, Elset=Cohesive_UMAT
7537,    1, 4794, 7429,    5
7538, 4794, 4793, 7428, 7429
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*Nset, nset=Composite, generate
     1,  19616,      1
*Nset, nset=Cohesive_UMAT
    1,    4,    5,   11, 2406, 2407
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*Orientation, name=Ori-1
1., 0., 0., 0., 1., 0.
3, 0.
** Section: Section-1
*Solid Section, elset=Composite, orientation=Ori-1, material=Material-1
25.,
*Cohesive Section, elset=Cohesive_UMAT, material=Material-2, response=TRACTION SEPARATION
25.,
*End Part
**
**
** ASSEMBLY
**
*Assembly, name=Assembly
**
*Instance, name=Part-1-1, part=Part-1
*End Instance
**
*Nset, nset=Fixed, instance=Part-1-1
    3,    4,   11,   12, 2404, 2405, 7430, 7431
*Elset, elset=Fixed, instance=Part-1-1
  7168,  7169,  7170, 17094, 17095, 17096
*Nset, nset=Top, instance=Part-1-1
 7,
*Nset, nset=Bottom, instance=Part-1-1
 10,
*End Assembly
**
**
** ELEMENT CONTROLS
**
** *Section Controls, name=EC-1, VISCOSITY=1e-05
** 1., 1., 1.
**
** MATERIALS
**
*Material, name=Material-1
*Elastic, type=ENGINEERING CONSTANTS
 120000.,10500.,10500.,0.3,0.3,0.51,5250.,5250.
 3480.,
*Material, name = Material-2
*DEPVAR
1,
*USER MATERIAL, TYPE=MECHANICAL, CONSTANTS=8, UNSYMM
1.0E5, 30.0, 58.9, 58.9, 0.26, 1.002, 1.002, 1.2
** *Damage Initiation, criterion=QUADS
** 30.0, 58.9, 58.9
** *Damage evolution, type=ENERGY, mixed mode behavior=BK, power=1.2
** 0.26,1.002,1.002
** *Elastic, type=TRACTION
** 1.0E5, 1.0E5, 1.0E5
**
** BOUNDARY CONDITIONS
**
** Name: BC-1 Type: Displacement/Rotation
*Boundary
Fixed, 1, 1
Fixed, 2, 2
** ----------------------------------------------------------------
**
** STEP: Step-1
**
*Step, name=Step-1, nlgeom=YES, inc=10000
*Static
0.001, 1., 1e-15, 0.01
**
** BOUNDARY CONDITIONS
**
** Name: BC-2 Type: Displacement/Rotation
*Boundary
Top, 2, 2, 3.5
** Name: BC-3 Type: Displacement/Rotation
*Boundary
Bottom, 2, 2, -3.5
**
** CONTROLS
**
*Controls, reset
*Controls, parameters=time incrementation
20, 40, , , , , , 20, , ,
**
** OUTPUT REQUESTS
**
*Restart, write, frequency=0
**
** FIELD OUTPUT: F-Output-1
**
*Output, field
*Node Output
RF, U
*Element Output, directions=YES
LE, S, SDV
**
** HISTORY OUTPUT: H-Output-1
**
*Output, history, variable=PRESELECT
*End Step
