*Heading
** Job name: ENF Model name: Model-1
** Generated by: Abaqus/CAE 2020
*Preprint, echo=NO, model=NO, history=NO, contact=NO
**
** PARTS
**
*Part, name=Part-1
*Node
      1,         -25.,           0.
      2,         -25.,         2.25
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*Element, type=CPE4I
1,  1, 19, 22,  4
2, 19, 20, 21, 22
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*Element, type=COH2D4
4729,   14, 3174,  123,    5
4730, 3174, 3175,  124,  123
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*Nset, nset=_PickedSet3, internal, generate
     1,  12608,      1
*Elset, elset=_PickedSet3, internal
     1,     2,     3,     4,     5,     6
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*Nset, nset=_PickedSet5, internal
    5,    7,   14,   15,  123,  124
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*Elset, elset=_PickedSet5, internal, generate
 4729,  6252,     1
*Orientation, name=Ori-1
1., 0., 0., 0., 1., 0.
3, 0.
** Section: Section-1
*Solid Section, elset=_PickedSet3, orientation=Ori-1, material=Material-1
25.4,
** Section: Section-2
*Cohesive Section, elset=_PickedSet5, material=Material-2, response=TRACTION SEPARATION
, 25.4
*End Part
**
**
** ASSEMBLY
**
*Assembly, name=Assembly
**
*Instance, name=Part-1-1, part=Part-1
*End Instance
**
*Nset, nset=Left, instance=Part-1-1
 13,
*Nset, nset=Load, instance=Part-1-1
 8,
*Nset, nset=Right, instance=Part-1-1
 18,
*Elset, elset=_m_Surf-1_S4, internal, instance=Part-1-1, generate
   1,  151,    3
*Surface, type=ELEMENT, name=m_Surf-1
_m_Surf-1_S4, S4
*Elset, elset=_s_Surf-1_S2, internal, instance=Part-1-1
 4728, 6255, 6258, 6261, 6264, 6267
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*Surface, type=ELEMENT, name=s_Surf-1
_s_Surf-1_S2, S2
*End Assembly
**
** MATERIALS
**
*Material, name=Material-1
*Elastic, type=ENGINEERING CONSTANTS
120000.,10500.,10500.,  0.30,  0.30,  0.51, 5250., 5250.
 3480.,
*Material, name=Material-2
*Depvar
1,
*User material,TYPE=MECHANICAL,constants = 8, UNSYMM
1.0e5, 30., 58.9, 58.9, 0.26, 1.002, 1.002, 2.0
**
** INTERACTION PROPERTIES
**
*Surface Interaction, name=IntProp-1
1.,
*Friction
0.,
*Surface Behavior, pressure-overclosure=HARD
**
** BOUNDARY CONDITIONS
**
** Name: BC-1 Type: Displacement/Rotation
*Boundary
** Left, 1, 1
Left, 2, 2
** Name: BC-2 Type: Displacement/Rotation
*Boundary
Right, 1, 1
Right, 2, 2
**
** INTERACTIONS
**
** Interaction: Int-1
*Contact Pair, interaction=IntProp-1, small sliding
s_Surf-1, m_Surf-1
** ----------------------------------------------------------------
**
** STEP: Step-1
**
*Step, name=Step-1, nlgeom=NO,inc=10000
*Static
1e-3, 1.0, 1e-15, 0.01
**
** BOUNDARY CONDITIONS
**
** Name: BC-3 Type: Displacement/Rotation
*Boundary
Load, 2, 2, -3.0
**
** CONTROLS
**
*Solution Technique, type=QUASI-NEWTON, reform kernel=25
*Controls, reset
*Controls, parameters=time incrementation
1000,1200,1500,2000,1600,4,20,20, , ,50, ,
0.25,0.5,0.75, ,0.25,0.25,1.5,
 , , , , , , ,
,
** OUTPUT REQUESTS
**
*Restart, write, frequency=0
**
** FIELD OUTPUT: F-Output-1
**
*Output, field,frequency=1
*Node Output
RF, U
*Element Output, directions=YES
LE, S,SDV
**
** HISTORY OUTPUT: H-Output-1
**
*Output, history,frequency=1
*node output,nset=Load
RF2,U2
*End Step
