*Heading
** Job name: MMB_0_5_Fatigue Model name: Model-1
** Generated by: Abaqus/CAE 2020
*Preprint, echo=NO, model=NO, history=NO, contact=NO
**
** PARTS
**
*Part, name=Part-1
*Node
      1,         -25.,           0.
      2,         -25.,         2.25
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*Element, type=CPE4I
1,  1, 19, 22,  4
2, 19, 20, 21, 22
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*Element, type=COH2D4
 9355,   12, 4748,  227,    9
 9356, 4748, 4747,  228,  227
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*Nset, nset=_PickedSet3, internal, generate
     1,  12480,      1
*Elset, elset=_PickedSet3, internal, generate
    1,  9354,     1
*Nset, nset=_PickedSet4, internal
    9,   12,   13,   16,  227,  228
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*Elset, elset=_PickedSet4, internal, generate
  9355,  10862,      1
*Orientation, name=Ori-1
1., 0., 0., 0., 1., 0.
3, 0.
** Section: Section-1
*Solid Section, elset=_PickedSet3,orientation=Ori-1, material=Material-1
25.4,
** Section: Section-2
*Cohesive Section, elset=_PickedSet4, material=Material-2, response=TRACTION SEPARATION
, 25.4
*End Part
**
*Part, name=Part-2
*Node
      1,          25.,        12.25
      2,          25.,         2.25
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*Element, type=R2D2
 1,  1,  6
 2,  6,  7
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*Node
    113,   66.3000031,        12.25,           0.
*Nset, nset=Part-2-RefPt_, internal
113,
*Nset, nset=RP_Part2
 113,
*Elset, elset=Part-2, generate
   1,  111,    1
*End Part
**
**
** ASSEMBLY
**
*Assembly, name=Assembly
**
*Instance, name=Part-1-1, part=Part-1
*End Instance
**
*Instance, name=Part-2-1, part=Part-2
*End Instance
**
*Nset, nset=Left, instance=Part-1-1
 8,
*Nset, nset=Left_Beam, instance=Part-1-1
 3,
*Nset, nset=Left_Lever, instance=Part-2-1
 5,
*Nset, nset=Middle_Beam, instance=Part-1-1
 14,
*Nset, nset=Right, instance=Part-1-1
 18,
*Nset, nset=Right_Lever, instance=Part-2-1
 2,
*Elset, elset=_Left_Surf_S2, internal, instance=Part-1-1
   3,   9,  12,  15,  18,  21
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*Surface, type=ELEMENT, name=Left_Surf
_Left_Surf_S2, S2
*Elset, elset=_Right_Surf_S3, internal, instance=Part-1-1, generate
 3323,  4830,     1
*Surface, type=ELEMENT, name=Right_Surf
_Right_Surf_S3, S3
*Surface, type=NODE, name=Left_Lever_CNS_, internal
Left_Lever, 1.
*Surface, type=NODE, name=Right_Lever_CNS_, internal
Right_Lever, 1.
*Surface, type=NODE, name=Left_Beam_CNS_, internal
Left_Beam, 1.
*Rigid Body, ref node=Part-2-1.Part-2-RefPt_, elset=Part-2-1.Part-2
** Constraint: Constraint-1
*MPC
PIN, Left_Beam, Left_Lever
** Constraint: Constraint-2
*Equation
2
Middle_Beam, 2, -1.
Right_Lever, 2, 1.
*End Assembly
**
** MATERIALS
**
*Material, name=Material-1
*Elastic, type=ENGINEERING CONSTANTS
120000.,10500.,10500.,0.3,0.3,0.51,5250.,5250.
3480.,
*Material, name = Material-2
*DEPVAR
1,
*USER MATERIAL, TYPE=MECHANICAL, CONSTANTS=8, UNSYMM
1.0E5, 30.0, 58.9, 58.9, 0.26, 1.002, 1.002, 1.198
**
** INTERACTION PROPERTIES
**
*Surface Interaction, name=IntProp-1
1.,
*Friction, slip tolerance=0.005
 0.2,
*Surface Behavior, pressure-overclosure=HARD
**
** BOUNDARY CONDITIONS
**
** Name: BC-1 Type: Displacement/Rotation
*Boundary
Left, 2, 2
** Name: BC-2 Type: Displacement/Rotation
*Boundary
Right, 1, 1
Right, 2, 2
** INTERACTIONS
**
** Interaction: Int-1
*Contact Pair, interaction=IntProp-1, small sliding
Left_Lever_CNS_, Left_Surf
** Interaction: Int-2
*Contact Pair, interaction=IntProp-1, small sliding
Right_Lever_CNS_, Right_Surf
** ----------------------------------------------------------------
**
** STEP: Step-1
**
*Step, name=Step-1, nlgeom=NO,inc=10000
*Static
1e-3, 1.0, 1e-15, 0.01
**
** BOUNDARY CONDITIONS
**
** Name: BC-3 Type: Displacement/Rotation
*Boundary
Part-2-1.RP_Part2, 2, 2, -3.0
**
** CONTROLS
**
*Solution Technique, type=QUASI-NEWTON, reform kernel=25
*Controls, reset
*Controls, parameters=time incrementation
1000,1200,1500,2000,1600,4,20,20, , ,50, ,
0.25,0.5,0.75, ,0.25,0.25,1.5,
 , , , , , , ,
,
** OUTPUT REQUESTS
**
*Restart, write, frequency=0
**
** FIELD OUTPUT: F-Output-1
**
*Output, field,frequency=1
*Node Output
RF, U
*Element Output, directions=YES
LE, S,SDV
**
** HISTORY OUTPUT: H-Output-1
**
*Output, history,frequency=1
*node output,nset=Part-2-1.RP_Part2
RF2,U2
*End Step
**
